OpenVSP model (file version 5), 3 components.
Geometry view with OpenVSP parameter names; values to 6 digits, angles in degrees, lengths in the model's unit.
Overall bounding box: X_Min=-3.9722e-05 X_Len=0.50804 Y_Min=-1.016 Y_Len=2.032 Z_Min=-0.0508 Z_Len=0.097352

Wing "WingGeom"
  location (X Y Z) 0 0 0, rotation 0 0 0
  symmetric about XZ
  bounding box size 0.50804 2.032 0.0619373
  totals: TotalSpan=2.032 TotalProjectedSpan=2.032 TotalChord=0.508 TotalArea=1.03226 TotalAR=4
  root: chord 0.508, twist 0, airfoil file "CLARK Y AIRFOIL"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 BaseThickChord=0.117018 ThickChord=0.117018
  sections:
    n  Span   Root_Chord  Tip_Chord  Area      Sweep  Sweep_Location  Dihedral  Twist  Twist_Location  tip airfoil
    1  1.016  0.508       0.508      0.516128  0      0               0         0      0.25            as above

Fuselage "leftplate"
  location (X Y Z) 0 -1.016 0, rotation 0 0 0
  bounding box size 0.508 0 0.0508
  Design: Length=0.508
  cross sections:
    n  XLocPercent  YLocPercent  ZLocPercent  shape
    0  0            0            -0.05        ellipse Ellipse_Height=0.0508 Ellipse_Width=0
    1  1            0            -0.05        as above

Fuselage "rightplate"
  location (X Y Z) 0 1.016 0, rotation 0 0 0
  bounding box size 0.508 0 0.0508
  Design: Length=0.508
  cross sections:
    n  XLocPercent  YLocPercent  ZLocPercent  shape
    0  0            0            -0.05        ellipse Ellipse_Height=0.0508 Ellipse_Width=0
    1  1            0            -0.05        as above
